r := FRAME
R := 6
n := 0 .. 20
m := 0 .. 20
v[n] := 2*π*n/(r + 1)
ω[m] := 2*π*m/(r + 1)
x[m, n] := (R + r*cos(v[n]))*cos(ω[m])
y[m, n] := (R + r*cos(v[n]))*sin(ω[m])
z[m, n] := r*sin(v[n])
# [component: inputs x, y, z]
