zf := 12
R := [
    128, 128, 128, 128, 128, 128, 128, 128;
    128, 128, 128, 128, 128, 0, 128, 128;
    128, 128, 128, 128, 0, 128, 128, 128;
    128, 128, 128, 0, 0, 128, 128, 128;
    128, 128, 128, 0, 128, 0, 128, 128;
    128, 128, 128, 0, 128, 128, 0, 128;
    128, 128, 128, 0, 128, 128, 0, 128;
    128, 128, 128, 128, 0, 0, 128, 128
]
R_z := zoom(R, zf, zf)
G := [
    128, 128, 128, 128, 128, 128, 128, 128;
    128, 128, 128, 128, 128, 0, 128, 128;
    128, 128, 128, 128, 0, 128, 128, 128;
    128, 128, 128, 0, 0, 128, 128, 128;
    128, 128, 128, 0, 128, 0, 128, 128;
    128, 128, 128, 0, 128, 128, 0, 128;
    128, 128, 128, 0, 128, 128, 0, 128;
    128, 128, 128, 128, 0, 0, 128, 128
]
G_z := zoom(G, zf, zf)
B := [
    0, 0, 0, 0, 0, 0, 0, 0;
    0, 0, 0, 0, 0, 0, 0, 0;
    0, 0, 0, 0, 0, 0, 0, 0;
    0, 0, 0, 0, 0, 0, 0, 0;
    0, 0, 0, 0, 0, 0, 0, 0;
    0, 0, 0, 0, 0, 0, 0, 0;
    0, 0, 0, 0, 0, 0, 0, 0;
    0, 0, 0, 0, 0, 0, 0, 0
]
B_z := zoom(B, zf, zf)
RGB1 := augment(R_z, G_z, B_z)
dummyRGB := WRITERGB("rgb.bmp", RGB1)
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