M1 := READRGB("img.bmp")
M2 := READBMP("img.bmp")
cols(M1) = 372
cols(M2) = 124
rows(M1) = 122
rows(M2) = 122
WRITERGB("dogRGB.bmp", M1) = 0
WRITEBMP("dogBMP.bmp", M1) = 0
width := cols(M1)/3 = 124
ORIGIN := 1
rValues := submatrix(M1, 1, 122, 1, width)
gValues := submatrix(M1, 1, 122, width + 1, 2*width)
bValues := submatrix(M1, 1, 122, 2*width + 1, 3*width)
WRITEBMP("rDog.bmp", rValues) = 0
WRITEBMP("gDog.bmp", gValues) = 0
WRITEBMP("bDog.bmp", bValues) = 0
WRITERGB("RGB_GREEN.bmp", augment(rValues, gValues*2.1, bValues)) = 0
WRITEBMP("BMP_GREEN.bmp", augment(rValues, gValues*2.1, bValues)) = 0
WRITERGB("RGB_RED.bmp", augment(rValues/3, gValues, bValues)) = 0
WRITEBMP("BMP_RED.bmp", augment(rValues/3, gValues, bValues)) = 0
