a := 1.5
b := 3
k := 1.4
α := 4.5
x1 := 2.1
x2 := 3, 7 .. 19
x2 = [3; 7; 11; 15; 19]
Z1 := (1 - sin((1 + a)^4)^2)/(k*b) = 0.0100964
Z2 := b*|cos(a)^3| - ln(α + e^x1) = -2.53787
Z1(k) := (1 - sin((1 + a)^4)^2)/(k*b) = 1.02379e21 s^2*K/(kg*m^2)
Z2(x2) := b*|cos(a)^3| - ln(α + e^x2)
Z2(x2) = [-3.2011; -7.00303; -10.999; -14.9989; -18.9989]
