α := 1.5
b := 3
k := 1.4
a := 4.5
x1 := 2.1
x2 := 3, 7 .. 19
Z1 := (1 - sin((1 + α)^4)^2)/(k*b) = 0.0100964
Z2 := b*cos(α)^3 - ln(a + e^x1) = -2.53787
Z2(x2) := b*cos(α)^3 - ln(a + e^x2)
Z2(x2) = [-3.2011; -7.00303; -10.999; -14.9989; -18.9989]
