№1
a4 := 12
a3 := -16
a1 := 2
a0 := -3
F(x) := a4*x^4 + a3*x^3 + a1*x + a0
x := 0
x1 := root(F(x), x) = -0.565969
x2 := root(F(x)/(x - x1), x) = 1.34404
x3 := root(F(x)/((x - x1)*(x - x2)), x) = 0.277632 + 0.501569i
x4 := root(F(x)/((x - x1)*(x - x2)*(x - x3)), x) = 0.277632 - 0.501569i
V[0] := a0
V[1] := a1
V[3] := a3
V[4] := a4
polyroots(V) = [-0.565969; 0.277632 + 0.501569i; 0.277632 - 0.501569i; 1.34404]
№2
x1 := 0
x2 := -1
x3 := 1
1.2*x1 + 0.3*x2 - 0.5*x3 == 1.7
1.3*x1 + 9.7*x2 - 1.8*x3 == 7.8
0.8*x1 + 4.1*x2 + 9.1*x3 == 5.4
A := [1.2, 0.3, -0.5; 1.3, 9.7, -1.8; 0.8, 4.1, 9.1]
B := [1.7; 7.8; 5.4]
X := A^-1*B = [1.32658; 0.659659; 0.179576]
solve block
    # constraints
    1.2*x1 + 0.3*x2 - 0.5*x3 == 1.7
    1.3*x1 + 9.7*x2 - 1.8*x3 == 7.8
    0.8*x1 + 4.1*x2 + 9.1*x3 == 5.4
    # solver
    Find(x1, x2, x3) = [1.32658; 0.659659; 0.179576]
    Given
end solve block
