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№1
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№2
y(x) :=
    if x ≤ 0
        sin(x)
    if 0 < x < π/4
        atan(x)
    if π/4 < x < 32
        log(x, 2)
    else
        1/x
f(x1, x2, m) :=
    dx ← ((x2 - x1)/m)
    x ← x1
    for i ∈ 0 .. (m - 1)
        f(x1, x2, m) ← x - sin(x)
        x ← x + dx
    f(x1, x2, m)
m := 1, 2 .. 10
x := -2
y(x) = -0.5
m = [1; 2; 3; 4; 5; 6; 7; 8; 9; 10]
f(0, π/2, m) = [0; 0.0782914; 0.181172; 0.254218; 0.305581; 0.343071; 0.371469; 0.393662; 0.411456; 0.426028]
x := 0.5
y(x) = 2
x := 10
y(x) = 3.32193
x := 33
y(x) = 0.030303
№3
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n := 15
m(n) :=
    k ← 0
    for i ∈ 0 .. (n - 1)
        if mod(i, 2) == 0 and mod(i, 3)
            k ← k + 1
    k
m(n) = 5
A := [1, 100, 2, 200; 3, 300, 4, 500; 6, 700, 8, 900]
F(A) :=
    k ← 0
    for i ∈ 0 .. 3
        for j ∈ 0 .. 4
            if A[i, j] > 99 and A[i, j] < 1000
                k ← k + 1
result := 0
result := F(A)  # error: Недопустимый индекс массива. Индекс должен быть целым числом не менее ORIGIN и не более номера последнего элемента.
