d[1] := 2*7*(1.518 - 1)*0.0116*(35*10^-3)/((46*10^-2) - (35*10^-3))*10^3 = 6.92779
δy[1] := 28*10^-3/10*10^3 = 2.8
d[2] := |2*8*(1.518 - 2)*0.0116*(35*10^-3)/((46*10^-2) - (35*10^-3))*10^3| = 7.36723
δy[2] := 29*10^-3/14*10^3 = 2.07143
d[3] := |2*9*(1.518 - 3)*0.0116*(35*10^-3)/((46*10^-2) - (35*10^-3))*10^3| = 25.4834
δy[3] := 27*10^-3/12*10^3 = 2.25
d[4] := |2*10*(1.518 - 4)*0.0116*(35*10^-3)/((46*10^-2) - (35*10^-3))*10^3| = 47.4208
δy[4] := 20*10^-3/10*10^3 = 2
d[5] := |2*11*(1.518 - 5)*0.0116*(35*10^-3)/((46*10^-2) - (35*10^-3))*10^3| = 73.1794
δy[5] := 29.5*10^-3/16*10^3 = 1.84375
λ[1] := d[1]*((46*10^-2) - (35*10^-3))/(((40*10^-2)*(46*10^-2)) - ((46*10^-2)*(35*10^-3)))*δy[1] = 49.1011
λ[2] := d[2]*((46*10^-2) - (35*10^-3))/(((40*10^-2)*(46*10^-2)) - ((46*10^-2)*(35*10^-3)))*δy[2] = 38.6289
λ[3] := d[3]*((46*10^-2) - (35*10^-3))/(((40*10^-2)*(46*10^-2)) - ((46*10^-2)*(35*10^-3)))*δy[3] = 145.137
λ[4] := d[4]*((46*10^-2) - (35*10^-3))/(((40*10^-2)*(46*10^-2)) - ((46*10^-2)*(35*10^-3)))*δy[4] = 240.07
λ[5] := d[5]*((46*10^-2) - (35*10^-3))/(((40*10^-2)*(46*10^-2)) - ((46*10^-2)*(35*10^-3)))*δy[5] = 341.53
middle_λ := (λ[1] + λ[2] + λ[3] + λ[4] + λ[5])/5 = 162.893
middle_δy := (δy[1] + δy[2] + δy[3] + δy[4] + δy[5])/5 = 2.19304
